# Worksheet setting: ORIGIN = 1
# [reference: N2 DATA PSEUDO CP.xmcd]
# [area: Theory]
# 1. hot stream:  m_h*h_h_in - m_h*(h_h_in - dh_h) - U_h*(A_conv/L_ch*dx)*(T_h - T_w) == 0  @ h == m*Cp, Cp ≠ Cp(T)
# ⇒  d/dx(T_h) + U_h*A_conv/(m_h*Cp_h*L_ch)*(T_h - T_w) == 0  @ θ_h == (T_h - T_c_in)/(T_h_in - T_c_in), NTU_h == U_h*A_conv/(m_h*Cp_h), X == x/L_ch
#
# d/dX(θ_h) + NTU_h*(θ_h - θ_w) == 0  B.C: θ_h(0) == 1
#
# 2. cold stream: m_c*(h_c - dh_c) - h_c*m_c - U_c*(A_conv/L_ch*(-dx))*(T_c - T_w) == 0
# ⇒  d/dx(T_c) + U_c*A_conv/(m_c*Cp_c*L_ch)*(T_w - T_c) == 0  @ θ_c == (T_c - T_c_in)/(T_h_in - T_v_in), NTU_c == U_c*A_conv/(m_c*Cp_c), X == x/L_ch
#
# d/dX(θ_c) + NTU_h*(θ_w - θ_c) == 0  B.C: θ_c(1) == 0
#
# 3. wall conduction:  A_cond*q''_x - A_cond*(q''_x + dq''_x) + U_h*(A_conv/L_ch*dx)*(T_h - T_w) - U_c*(A_conv/L_ch*dx)*(T_w - T_c) == 0
# @ dq'' == -k_w*(d/dx(T))
#
# ⇒  d^2/dx^2(T_w) + U_h*A_conv/(L_ch*(k_w*A_cond))*(T_h - T_w) - U_c*A_conv/(L_ch*(k_w*A_cond))*(T_w - T_c) == 0  @ θ_w == (T_w - T_c_in)/(T_h_in - T_c_in), X == x/L_ch, C_c == m_c*Cp_c , C_h == m_h*Cp_h , C_min == min(C_c, C_h)
#
# ⇒  d^2/dX^2(θ_w) + U_h*A_conv/C_h*C_h/C_min*C_min*L_ch/(k_w*A_cond)*(θ_h - θ_w) - U_c*A_conv/C_c*C_c/C_h*C_h/C_min*C_min*L_ch/(k_w*A_cond)*(θ_w - θ_c) == 0
# @ ν == C_c/C_h, μ == C_h/C_min, λ == k_w*A_cond/(L_ch*C_min)
# d^2/dX^2(θ_w) + NTU_h*μ/λ*(θ_h - θ_w) - NTU_c*ν*μ/λ*(θ_w - θ_c) == 0  B.Cs: θ'_w(0) == θ'_w(1) == 0  - wall ends insulated
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# system od ODEs
# θ_h == y_1  d/dX(θ_h) == NTU_h*(θ_w - θ_h)  B.C:  θ_h(0) == 1
# θ_c == y_2  ⇒  d/dX(θ_c) == NTU_c(θ_c - θ_w)  B.C:  θ_c(1) == 0
# θ_w == y_3 , θ_w' == y_3' == y_4  d/dX(θ_w) == y_3' == y_4
# d^2/dX^2(θ_w) == d/dX(d/dX(θ_w)) == NTU_h*μ/λ*(θ_w - θ_h) + NTU_c*ν*μ/λ*(θ_w - θ_c)  B.Cs:  θ'_w(0) == θ'_w(1) == 0
# Resultand Boundary Value Problem - BVP
# B.Cs:
[y_1(0) == 1; y_2(1) == 0; y_4(0) == 0; y_4(1) == 0]
[y_1'; y_2'; y_3'; y_4'] == [NTU_h*(y_3 - y_1); NTU_h*(y_2 - y_3); y_4; NTU_h*μ/λ*(y_3 - y_1) + NTU_c*ν*μ/λ*(y_3 - y_2)]
# In order to solve such a problem, it have to be modified into initial values problem.
# It means that y_2(1) == 0 and y_4(1) == 0 conditions, must be replaced.
# Shooting method is used in order to acheive two unknown initial conditions using using matching boundary conditions.
# In mathcad "sbval" - function used for this purpose.
# In matlab "bvp4c" - function used.
# [area: PRE]
## Geometry relations
# Wet etching production dependency (50μm is mask precision)
δ_mask := 50*μm
S_w := y_H*2 + δ_mask + d_H
d_L := S_w - δ_mask - 2*y_L
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S_w = 250 μm
Nu_factor := 1
y_H ≡ 50*μm
y_L ≡ 50*μm
d_H ≡ 100*μm
d_L = 100 μm
f'_factor := 1
# [component: outputs tube_form]
w_HE ≡ 10*mm
L_HE ≡ 27.5*mm
S_L := S_w
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t_w ≡ 0.2*mm
T_H_in := 333*K  # Nist Site
k_w ≡ 1.14*W*m^-1*K^-1
p_H_in := 2300*psi  # STRENGTH CALCULATOR
# HOLMAN
p_L_out := 14.7*psi
m_dot := 100*mg/s
# [area: SOLVER + POST]
T_L_in := 80*K
## Calculating Nitrogen properties
# Properties vectors
N_pts := 21
# Properties vectors
ind := 1 .. N_pts
T_H_vec[ind] := T_H_out* + (T_H_in - T_H_out*)/(N_pts - 1)*(ind - 1)
h_H_ref := h_H_Tref
T_L_vec[ind] := T_L_in + (T_L_out* - T_L_in)/(N_pts - 1)*(ind - 1)
h_L_ref := h_L_Tref
# ---------------------- mean properties between T_H_in = 333 K and T_H_out* = 150 K ------------------------------
# ---------------------- mean properties between T_L_in = 80 K and T_L_out* = 290 K ------------------------------
ρ_L_av := mean(vectorize(ρ_L(T_L_vec)))
ρ_H_av := mean(vectorize(ρ_H(T_H_vec)))
μ_L_av := mean(vectorize(μ_f_L(T_L_vec)))
μ_H_av := mean(vectorize(μ_f_H(T_H_vec)))
k_L_av := mean(vectorize(k_f_L(T_L_vec)))
k_H_av := mean(vectorize(k_f_H(T_H_vec)))
Cp_L_av := mean(vectorize(c_p_L(T_L_vec)))
Cp_H_av := mean(vectorize(c_p_H(T_H_vec)))
v_s_L_av := mean(vectorize(v_s_L(T_L_vec)))
v_s_H_av := mean(vectorize(v_s_H(T_H_vec)))
γ_L_av := mean(vectorize(γ_L(T_L_vec)))
γ_H_av := mean(vectorize(γ_H(T_H_vec)))
Pr_L_av := Cp_L_av*μ_L_av/k_L_av
Pr_H_av := Cp_H_av*μ_H_av/k_H_av
FLUID_PROPERTIES := [
    "Property", "H stream", "L stream";
    "rho [kg/m3]", ρ_H_av*(kg/m^3)^-1, ρ_L_av*(kg/m^3)^-1;
    "Cp [J/kg_K]", Cp_H_av*(J/(kg*K))^-1, Cp_L_av*(J/(kg*K))^-1;
    "k [W/m_K]", k_H_av*(W/(m*K))^-1, k_L_av*(W/(m*K))^-1;
    "mu [Pa*s]", μ_H_av*(Pa*s)^-1, μ_L_av*(Pa*s)^-1
]
## Flow calculations
N_w := floor(w_HE/S_w)  # number of rows in transverse flow direction
N_L := floor(L_HE/S_L)  # number of rows in direction of flow
τ_H_w := S_w/d_H
τ_L_w := S_w/d_L
# -----------------------------------------------------------------------pillars reduced lengths----------------------------------------------------------------------------
τ_H_L := S_L/d_H
τ_L_L := S_L/d_L
A_conv := S_w*L_HE  # area of convection in plain channel formation
A_cond := S_w*t_w  # area of conduction in plain channel formation
# -------------------------------------------------------------------------total  flow area ---------------------------------------------------------------------
A_L_f := y_L*w_HE
A_H_f := y_H*w_HE
# ---------------------------------------------total area of convection in pillars channel formation------------------------------
A_L_conv := A_conv - π*d_L^2/4*N_L
A_H_conv := A_conv - π*d_H^2/4*N_L
u_max(u_∞, τ_w, τ_L) := u_∞*max(τ_w/(sqrt((τ_w/2)^2 + τ_L^2) - 1), τ_w/(τ_w - 1))
v_H_av := m_dot/(A_H_f*ρ_H_av)
v_L_av := m_dot/(A_L_f*ρ_L_av)
v_H_av_max := u_max(v_H_av, τ_H_w, τ_H_L)
v_H_av_max = 1.99878 m/s
v_L_av_max := u_max(v_L_av, τ_L_w, τ_L_L)
v_L_av_max = 193.194 m/s
# Reynolds Number - laminar flow for Re~<2300
Re_H_av_max := ρ_H_av*v_H_av_max*d_H/μ_H_av
Re_H_av_max = 1767.21
Re_L_av_max := ρ_L_av*v_L_av_max*d_L/μ_L_av
Re_L_av_max = 2438.29
# Mach Number - incompressible flow for Ma<0.3
Ma_H_av_max := v_H_av_max/v_s_H_av
Ma_H_av_max = 0.00587792
Ma_L_av_max := v_L_av_max/v_s_L_av
Ma_L_av_max = 0.650652
# Knudsen Number - Navier-Stokes Equations are Applicable for Kn<0.05
Kn_H_av_max := Ma_H_av_max/Re_H_av_max*sqrt(γ_H_av*π/2)
Kn_H_av_max = 5.664e-6
Kn_L_av_max := Ma_L_av_max/Re_L_av_max*sqrt(γ_L_av*π/2)
Kn_L_av_max = 0.000396576
## Nu Calculations
Nu_metzger(Re_av_max, τ_w) :=
    data ← [1.5, 0.092*Re_av_max^0.707; 2.5, 0.069*Re_av_max^0.728]
    linterp(data[:, 1], data[:, 2], τ_w)
Nu_H := Nu_metzger(Re_H_av_max, τ_H_w)
Nu_H = 15.9542
Nu_L := Nu_metzger(Re_L_av_max, τ_L_w)
Nu_L = 20.1673
U_H := 1/(1/(Nu_H*k_H_av/d_H) + 1/2*t_w/k_w)
U_H = 3425.6 W/(m^2*K)
U_L := 1/(1/(Nu_L*k_L_av/d_L) + 1/2*t_w/k_w)
U_L = 2948.39 W/(m^2*K)
U := 1/(1/(Nu_H*k_H_av/d_H) + 1/(Nu_L*k_L_av/d_L) + t_w/k_w)*Nu_factor
## Heat exchanger solution
m_ch := m_dot/(w_HE/S_w)
C_H_av := m_ch*Cp_H_av
C_L_av := m_ch*Cp_L_av
C_min := min(C_L_av, C_H_av)
μ_HE := C_H_av/C_min
ν_HE := C_L_av/C_H_av
λ_HE := k_w*A_cond/(C_min*L_HE)
NTU := U*min(A_H_conv, A_L_conv)/C_min
D(x, y) := [NTU/μ_HE*(y[2] - y[1]); NTU/(μ_HE*ν_HE)*(y[2] - y[1])]
x0 := 0
x1 := 1
v := [0.5]
load(x0, v) := [1; v[1]]
score(x1, y) := [y[2]]
v := sbval(v, x0, x1, D, load, score)
N_steps := 50
init := load(x0, v)
sol := Radau(init, x0, x1, N_steps, D, 0.001)
θ_H := sol[:, 2]
θ_L := sol[:, 3]
X := sol[:, 1]
θ_H_in := θ_H[ORIGIN]
θ_L_in := reverse(θ_L)[ORIGIN]
θ_L_out := θ_L[ORIGIN]
θ_H_out := reverse(θ_H)[ORIGIN]
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θ_H_in = 1
θ_L_out = 0.840233
θ_H_out = 0.317953
θ_L_in = -4.3122e-7
T_H := θ_H*(T_H_in - T_L_in) + T_L_in
T_L := θ_L*(T_H_in - T_L_in) + T_L_in
T_H_out := reverse(T_H)[ORIGIN]
T_L_out := T_L[ORIGIN]
## Calculating pressure drop
# Jacob correlation for pressure drop (Holman p. 305) | HOLMAN
f''(Re_D) := 96/Re_D
f`(Re_av_max, τ_w, τ_L) :=
    (0.044 + 0.08*τ_L/((τ_w - 1)^0.43 + 1.13*1/τ_L))*Re_av_max^-0.15 if not tube_form
    (0.25 + 0.118/(τ_w - 1)^1.08)*Re_av_max^-0.16 if tube_form
D_H := 2*y_H
D_L := 2*y_L
Δp_ch(Re_D, ρ_av, v, D_h) := 1/2*ρ_av*v^2*L_HE/D_h*f''(Re_D)
Δp(Re_av_max, τ_w, τ_L, v_av_max, ρ_av, N_L) := 2*f`(Re_av_max, τ_w, τ_L)*f'_factor*(v_av_max*ρ_av)^2*N_L/ρ_av
ρ_H_vec := vectorize(ρ_H(T_H))
ρ_L_vec := vectorize(ρ_H(T_L))
μ_H_vec := vectorize(μ_f_H(T_H))
μ_L_vec := vectorize(μ_f_H(T_L))
v_H_vec := m_dot/(A_H_f*ρ_H_vec)
v_L_vec := m_dot/(A_L_f*ρ_L_vec)
v_H_max_vec := u_max(v_H_vec, τ_H_w, τ_L_w)
v_L_max_vec := u_max(v_L_vec, τ_L_w, τ_L_w)
Re_H_vec := vectorize(ρ_H_vec*v_H_max_vec*d_H/μ_H_vec)
Re_L_vec := vectorize(ρ_L_vec*v_L_max_vec*d_L/μ_L_vec)
Re_D_H_vec := vectorize(ρ_H_vec*v_H_vec*D_H/μ_H_vec)
Re_D_L_vec := vectorize(ρ_L_vec*v_L_vec*D_L/μ_L_vec)
Δp_H_ch_vec := vectorize(Δp_ch(Re_D_H_vec, ρ_H_vec, v_H_vec, D_H))
Δp_L_ch_vec := vectorize(Δp_ch(Re_D_L_vec, ρ_L_vec, v_L_vec, D_L))
Δp_H_pil_vec := vectorize(Δp(Re_H_vec, τ_H_w, τ_H_L, v_H_max_vec, ρ_H_vec, N_L))
Δp_L_pil_vec := vectorize(Δp(Re_L_vec, τ_L_w, τ_L_L, v_L_max_vec, ρ_L_vec, N_L))
Δp_H_pillar := mean(Δp_H_pil_vec)
Δp_L_pillar := mean(Δp_L_pil_vec)
Δp_H_ch := mean(Δp_H_ch_vec)
Δp_L_ch := mean(Δp_L_ch_vec)
Δp_L := Δp_L_pillar + Δp_L_ch
Δp_H := Δp_H_pillar + Δp_H_ch
p_H_out := p_H_in - Δp_H
p_L_in := p_L_out + Δp_L
δQ_cooler_max := m_dot*(h_L(T_H_in) - h_H(T_H_in))
Δh_HE_max := h_H(T_H_in) - h_H(T_L_in)
δQ_cooler := m_dot*(h_L(T_L_out) - h_H(T_H_in))
δq_max := m_ch*Δh_HE_max
δq_L := m_ch*(h_H(T_L_out) - h_H(T_L_in))
ε_cooler := δQ_cooler/δQ_cooler_max
ε_HE := δq_L/δq_max
δQ_HE := w_HE/S_w*δq_L
ΔT_m := ((T_H_in - T_L_out) - (T_H_out - T_L_in))/ln((T_H_in - T_L_out)/(T_H_out - T_L_in))
U_av := δq_L/(A_conv*ΔT_m)
# Maranzana number calculation
Bi_H := U_H*t_w/k_w
Bi_L := U_L*t_w/k_w
NTU_H := U_H*A_H_conv/(m_ch*Cp_H_av)
NTU_L := U_L*A_L_conv/(m_ch*Cp_L_av)
M_H_av := (t_w/L_HE)^2*NTU_H/Bi_H
M_L_av := (t_w/L_HE)^2*NTU_L/Bi_L
# summary table
COMPARE_SUMMARY := [
    "Property", "Mathcad";
    "T.H_out [K]", T_H_out*(K^-1);
    "T.L_out [K]", T_L_out*(K^-1);
    "---------------------", "---------------------";
    "Dq.L [mW]", δq_L*(mW^-1);
    "---------------------", "---------------------";
    "U [W/m^2_K]", U_av*(W/(m^2*K))^-1;
    "---------------------", "---------------------";
    "Dp.H [psi]", Δp_H*psi^-1;
    "Dp.L [psi]", Δp_L*psi^-1;
    "HE eff. [%]", ε_HE*(%^-1);
    "cooler eff. [%]", ε_cooler*(%^-1);
    "---------------------", "---------------------";
    "Dq.cooler [mW]", δQ_cooler*mW^-1;
    "Dq.HE [mW]", δQ_HE*mW^-1
]
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# HE performance | Cooler performance
T_H_out* ≡ 150*K
T_H_in = 333 K
ε_HE = 89.0204 %
ε_cooler = 870.718 %
T_H_out = 160.442 K
p_H_in = 2300 psi
δq_L = 981.966 mW
δQ_cooler = -4755.29 mW
p_H_out = 2298.07 psi
Ma_H_av_max = 0.00587792
δq_max = 1103.08 mW
δQ_cooler_max = -546.134 mW
Δp_H = 1.92534 psi
Re_H_av_max = 1767.21
δQ_HE = 39.2786 W
# Maranzana number - proposed criteria is should be less than 0.01
M_L_av = 0.000695499
M_H_av = 0.000564561
T_L_in = 80 K
p_L_in = 16.0873 psi
FLUID_PROPERTIES = [
    "Property", "H stream", "L stream";
    "rho [kg/m3]", 166.769, 1.72538;
    "Cp [J/kg_K]", 1284.01, 1042.28;
    "k [W/m_K]", 0.0306951, 0.0197199;
    "mu [Pa*s]", 1.88621e-5, 1.36708e-5
]
T_L_out* ≡ 290*K
p_L_in* ≡ 24*psi
m_dot = 100 mgm/s
T_L_out = 292.579 K
p_L_out = 14.7 psi
m_ch = 2.5 mgm/s
Ma_L_av_max = 0.650652
Δp_L = 1.38731 psi
Re_L_av_max = 2438.29
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COMPARE_SUMMARY = [
    "Property", "Mathcad";
    "T.H_out [K]", 160.442;
    "T.L_out [K]", 292.579;
    "---------------------", "---------------------";
    "Dq.L [mW]", 981.966;
    "---------------------", "---------------------";
    "U [W/m^2_K]", 2456.08;
    "---------------------", "---------------------";
    "Dp.H [psi]", 1.92534;
    "Dp.L [psi]", 1.38731;
    "HE eff. [%]", 89.0204;
    "cooler eff. [%]", 870.718;
    "---------------------", "---------------------";
    "Dq.cooler [mW]", -4755.29;
    "Dq.HE [mW]", 39278.6
]
